*Heading
********************************************************************************************
** Random microstructure 3D
** 71 elements per edge
** Contrast ratio 1.5
** Periodic boundary conditions imposed on direction 1
********************************************************************************************
**
*node,nset=alln,input=mesh3D_71node.txt
**
*element,elset=allel,input=mesh3D_71element.txt,TYPE=C3D8
**------------------------------------------------------------------------------------------
*Nset, nset=n1plus
      74,      75,      76,      77,      78,      79
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**
*Nset, nset=n1minus
  368138,  368139,  368140,  368141,  368142,  368143
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**
*Nset, nset=n2plus
    5257,    5329,    5401,    5473,    5545,    5617
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**
*Nset, nset=n2minus
    5328,    5400,    5472,    5544,    5616,    5688
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**
*Nset, nset=n3plus
    5186,    5187,    5188,    5189,    5190,    5191
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**
*Nset, nset=n3minus
   10298,   10299,   10300,   10301,   10302,   10303
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**
*Nset, nset=n1plus_n2plus
      73,     145,     217,     289,     361,     433
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**
*Nset, nset=n1minus_n2plus
  368137,  368209,  368281,  368353,  368425,  368497
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**
*Nset, nset=n1plus_n2minus
     144,     216,     288,     360,     432,     504
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**
*Nset, nset=n1minus_n2minus
  368208,  368280,  368352,  368424,  368496,  368568
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**
*Nset, nset=n2plus_n3plus
    5185,   10369,   15553,   20737,   25921,   31105
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**
*Nset, nset=n2plus_n3minus
   10297,   15481,   20665,   25849,   31033,   36217
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**
*Nset, nset=n2minus_n3plus
    5256,   10440,   15624,   20808,   25992,   31176
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**
*Nset, nset=n2minus_n3minus
   10368,   15552,   20736,   25920,   31104,   36288
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**
*Nset, nset=n3plus_n1plus
       2,       3,       4,       5,       6,       7
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**
*Nset, nset=n3plus_n1minus
  368066,  368067,  368068,  368069,  368070,  368071
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**
*Nset, nset=n3minus_n1plus
    5114,    5115,    5116,    5117,    5118,    5119
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**
*Nset, nset=n3minus_n1minus
  373178,  373179,  373180,  373181,  373182,  373183
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**
*Elset, elset=elset1
       1,       2,       3,       4,       5,       6
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**
*Elset, elset=elset2
      14,      19,      20,      27,      32,      37
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
**-----------------------------------------------------------------
** Implement periodic boundary conditions
*equation
3
n1plus, 1, 1, n1minus, 1, -1, 1, 1, -1
2
n1plus, 2, 1, n1minus, 2, -1
2
n1plus, 3, 1, n1minus, 3, -1
**
2
n2plus, 1, 1, n2minus, 1, -1
2
n2plus, 2, 1, n2minus, 2, -1
2
n2plus, 3, 1, n2minus, 3, -1
**
2
n3plus, 1, 1, n3minus, 1, -1
2
n3plus, 2, 1, n3minus, 2, -1
2
n3plus, 3, 1, n3minus, 3, -1
**
**
3
n1plus_n2plus, 1, 1, n1minus_n2plus, 1, -1, 1, 1, -1
3
n1plus_n2minus, 1, 1, n1minus_n2minus, 1, -1, 1, 1, -1
2
n1minus_n2plus, 1, 1, n1minus_n2minus, 1, -1
**
2
n1plus_n2plus, 2, 1, n1minus_n2plus, 2, -1
2
n1plus_n2minus, 2, 1, n1minus_n2minus, 2, -1
2
n1minus_n2plus, 2, 1, n1minus_n2minus, 2, -1
**
2
n1plus_n2plus, 3, 1, n1minus_n2plus, 3, -1
2
n1plus_n2minus, 3, 1, n1minus_n2minus, 3, -1
2
n1minus_n2plus, 3, 1, n1minus_n2minus, 3, -1
**
**
3
n3plus_n1plus, 1, 1, n3plus_n1minus, 1, -1, 1, 1, -1
3
n3minus_n1plus, 1, 1, n3minus_n1minus, 1, -1, 1, 1, -1
2
n3plus_n1minus, 1, 1, n3minus_n1minus, 1, -1
**
2
n3plus_n1plus, 2, 1, n3plus_n1minus, 2, -1
2
n3minus_n1plus, 2, 1, n3minus_n1minus, 2, -1
2
n3plus_n1minus, 2, 1, n3minus_n1minus, 2, -1
**
2
n3plus_n1plus, 3, 1, n3plus_n1minus, 3, -1
2
n3minus_n1plus, 3, 1, n3minus_n1minus, 3, -1
2
n3plus_n1minus, 3, 1, n3minus_n1minus, 3, -1
**
**
2
n2plus_n3plus, 1, 1, n2minus_n3plus, 1, -1
2
n2plus_n3minus, 1, 1, n2minus_n3minus, 1, -1
2
n2minus_n3plus, 1, 1, n2minus_n3minus, 1, -1
**
2
n2plus_n3plus, 2, 1, n2minus_n3plus, 2, -1
2
n2plus_n3minus, 2, 1, n2minus_n3minus, 2, -1
2
n2minus_n3plus, 2, 1, n2minus_n3minus, 2, -1
**
2
n2plus_n3plus, 3, 1, n2minus_n3plus, 3, -1
2
n2plus_n3minus, 3, 1, n2minus_n3minus, 3, -1
2
n2minus_n3plus, 3, 1, n2minus_n3minus, 3, -1
**** -----------------------------------------------------------------
** MATERIALS
**
*Solid Section, elset=elset1, material=material-1
1.,
*Material, name=material-1
*Elastic,type=isotropic
120, 0.3
** Solid (element 2 = elset2)
**
*Solid Section, elset=elset2, material=material-2
1.,
**
*Material, name=material-2
*Elastic,type=isotropic
80, 0.3
** ----------------------------------------------------------------
**
** STEP: Step-1
**
*Step, name=Step-1
*Static
1., 1., 1e-05, 1.
**
** BOUNDARY CONDITIONS
**
** Name: BC-1 Type: Displacement/Rotation
*Boundary
**
10648,1,3,0
10186,1,3,0
10627,1,3,0
10165,1,3,0
484,1,1,0.02
22,1,1,0.02
463,1,1,0.02
1,1,1,0.02
484,2,3,0
22,2,3,0
463,2,3,0
1,2,3,0
**
** OUTPUT REQUESTS
**
*output, field, frequency=0
**
*output, history, frequency=0
**
*el print, summary=no, totals=yes
E
**
*End Step
